package omp 40 # Please set this number as the number of threads of your computer

processors * * *
log HSMA1_1.out
units lj
atom_style full
boundary p p p

region box block 0 50 0 50 0 50
create_box 2 box
region middle block 0 50 0 50 0 50
create_atoms 1 random 1500 667 middle # 667 is a random seed
create_atoms 2 random 1500 536 middle # 536 is a random seed

variable temperature equal 1.2
variable epsilon equal 0.285714
variable coul_cut equal 10.0 # should not become larger than min{Lx/2, Ly/2, Lz/2}
group ani type 1
group cat type 2
mass 1 1
mass 2 1
set type 1 charge -1
set type 2 charge 1

fix energy all nve
thermo 2000
thermo_style custom step temp ke pe etotal
###Soft potential
neighbor  2.0 bin
neigh_modify binsize 6
pair_style soft 1.0
pair_coeff * * 0.0
variable prefactor equal ramp(0,30)
fix 1 all adapt 1 pair soft a * * v_prefactor
fix lgv1 all langevin ${temperature} ${temperature} 100.0 81
timestep 0.001
run 10000
unfix 1
unfix lgv1

#turn on electrostatics

pair_style lj/cut/omp ${coul_cut}  # for the HSMA
#pair_style lj/cut/coul/long/omp ${coul_cut} ${coul_cut} # for the PPPM

pair_coeff * * 1.0 1.0 1.122462048
pair_modify shift yes

kspace_style HSMA3D 1.0e-5 1.2 8 128 55.0 89.0 0 0 # for the HSMA
#kspace_style pppm/omp 1.0e-5 # for the PPPM

dielectric ${epsilon}

neighbor        2.0 bin
neigh_modify delay 5 every 5 check no one 5000 binsize 6 # defaults: page 100000 one 2000

thermo_modify line one
thermo 100

fix 1 all nvt temp 1.2 1.2 0.005

timestep 0.001
run 50000

# compute the MSD
compute msd cat msd com yes
variable twopoint equal c_msd[4]/6.0/(step*dt+1.0e-7)
fix store all vector 1 c_msd[4]
variable fitslope equal slope(f_store)/6.0/(100*dt)

thermo_style custom step temp c_msd[4] v_twopoint v_fitslope etotal

run 100000

# compute the VACF
compute vacf cat vacf
fix  5 cat vector 1 c_vacf[4]
variable  diff equal dt*trap(f_5)
thermo_style custom step temp c_msd[4] v_twopoint v_fitslope v_diff c_vacf[1] c_vacf[2] c_vacf[3] c_vacf[4]

thermo 1

run 1000
